// COMSOL Multiphysics 5.3.0.316 model "NIR-WFOVMS_Silicon_nanodisks.mph"
// Outline of the model tree

Parameters
  nSi = 3.49  // Re refractive index of Si
  kSi = 0.001  // Im refractive index of Si
  lam = 940[nm]  // wavelength
  t_disk = 750[nm]  // disk thickness
  r_disk = 100[nm]  // disk radius
  period = 450[nm]  // period
  t_sub = 2[um]  // substrate thickness
  t_sup = 2[um]  // superstraight thickness
  f0 = c_const/lam  // frequency
  t_pml = lam/2  // thickness of PML layer
  t_int = 1.2[um]  // thickness of interest volume
  t_sub_aux = 1 [um]  // for auxiliary block
  n_sapph = 1.76  // refractive index of sapphire
  dt_int = 200[nm]  // shift in the position of the IV
  phase_ref = 0.805[rad]  // reference phase at lam 940 nm

Coordinate systems
  pml1: PML "Perfectly Matched Layer 1" on domains 1, 6

Geometry
  geom1 "Geometry 1" (3D, length unit m)
    blk1: Block "superstrate"
      pos = {0, 0, t_pml/2+t_sup/2}
      base = center
      size = {period, period, t_sup+t_pml}
      layername = Layer 1
      layer = t_pml
      layerbottom = off
      layertop = on
    blk2: Block "substrate"
      pos = {0, 0, -t_sub/2-t_pml/2}
      base = center
      size = {period, period, t_sub+t_pml}
      layername = Layer 1
      layer = t_pml
    cyl1: Cylinder "Si disk" | r = r_disk; h = t_disk
    blk3: Block "IV" | pos = {0, 0, t_int/2-dt_int}; base = center; size = {period, period, t_int}
    fin: Finalize "Form Union"

Materials
  mat1: Common "a-Si" on domains 1-3, 6, 7
    def "Basic"
      relpermittivity = (nSi+1i*kSi)^2
      relpermeability = 1
      electricconductivity = 0
  mat2: Common "air" on domains 1-6
    def "Basic"
      relpermittivity = 1
      relpermeability = 1
      electricconductivity = 0
  mat3: Common "sapphire" on domains 1-3
    def "Basic"
      relpermittivity = n_sapph^2
      relpermeability = 1
      electricconductivity = 0

Physics
  ewfd: ElectromagneticWavesFrequencyDomain on all domains
    dependent variable E = {Ex, Ey, Ez}
    wee1: WaveEquationElectric (default) | DisplacementFieldModel = RelativePermittivity; n_mat = from_mat
    pec1: PerfectElectricConductor (default)
    init1: init "Initial Values 1" (default)
    port1: Port "Port In" on boundaries 18
      SpecifyDepositedPower = 0
      PortSlit = 1
      SlitType = DomainBacked
      beta = 2*pi/lam
      E0 = {1, 0, 0}
    port2: Port "Port Out" on boundaries 6
      PortExcitation = off
      PortSlit = 1
      SlitType = DomainBacked
      PortOrientation = ForwardPort
      beta = 2*pi/lam*1.3
      E0 = {1, 0, 0}
    sctr1: Scattering "Scattering Boundary Condition 1" on boundaries 3, 19
    pc1: PeriodicCondition on boundaries 1, 4, 7, 10, 13, 16, 32-37
      PeriodicType = Continuity
      Floquet_source = FromPeriodicPort
      destinationDomains: boundaries 32-37
    pc2: PeriodicCondition on boundaries 2, 5, 8, 11, 14, 17, 20-25
      PeriodicType = Continuity
      Floquet_source = FromPeriodicPort
      destinationDomains: boundaries 20-25

Mesh
  mesh1 "Mesh 1"
    size: MeshSizeDefault | hmax = lam/10; hmin = 5E-9; hauto = 1; custom = on
    map1: Map "Mapped 1" on boundaries 2, 5, 14, 17
      size1: Size on boundaries 2, 5, 14, 17 | hmax = lam/16; custom = on
    swe2: Sweep "Swept 2" on domains 1, 2, 5, 6 | sourceface = boundaries 2, 5, 8, 17
    conv1: Convert on no boundaries
    ftri1: FreeTri "Free Triangular 1" on boundaries 8, 11
      size1: Size on boundaries 8, 11 | hmax = lam/16; custom = on
    cpf1: CopyFace | source = boundaries 8, 11; destination = boundaries 22, 23
    ftri2: FreeTri "Free Triangular 2" on boundaries 7, 10
      size1: Size on boundaries 7, 10 | hmax = lam/16; custom = on
    cpf2: CopyFace | source = boundaries 7, 10; destination = boundaries 34, 35
    size1: Size "Size VI" on domains 3, 4 | hmax = lam/16; custom = on
    size2: Size "Size bulk" on domains 1, 2, 5, 6 | hmax = lam/16; custom = on
    ftet1: FreeTet "Free Tetrahedral 1" on remaining entities

Studies
  std1 "Study 1"
    param: Parametric "Parametric Sweep" | sweeptype = filled; pname = r_disk; plistarr = range(50,5,140); punit = nm
    freq: Frequency "Frequency Domain" | plist = f0

Solver configurations
  sol1 "Solution 1" (study std1)
    v1: Variables "Dependent Variables 1"
    s1: Stationary "Stationary Solver 1" | stol = 0.01
      p1: Parametric | pname = freq; plistarr = f0; punit = Hz; pcontinuationmode = no
      fc1: FullyCoupled | linsolver = d1
      d1: Direct "Suggested Direct Solver (ewfd)" | linsolver = pardiso
  sol2 "Parametric Solutions 1" (study std1)

Datasets
  dset1: Solution | solution = sol1
  cpl1: CutPlane "rotation measurement plane1"
    data = dset2
    quickplane = xy
    quickz = -1.2e-5
    genpoints = {{0, 0, 2.5E-6}, {-1.38779E-17, 0.92848, 0.371385}, {-0.967297, -0.0941991, 0.235507}}
  cpl4: CutPlane "rotation measurement plane2"
    data = dset2
    quickplane = xy
    quickz = -0.9e-5
    genpoints = {{0, 0, 2.5E-6}, {-1.38779E-17, 0.92848, 0.371385}, {-0.967297, -0.0941991, 0.235507}}
  dset2: Solution | solution = sol2
  cpl2: CutPlane "yz crosscut" | data = dset2; quickplane = xz
  cpl3: CutPlane "xy crosscut" | data = dset2; quickplane = xy; quickz = 1.1e-6; genparadist = range(2.0e-5,1,0)

Derived values
  gev1: EvalGlobal "phase" | data = dset2; table = tbl3; expr = arg(ewfd.S21)-phase_ref; unit = rad
  gev2: EvalGlobal "transmittance" | data = dset2; table = tbl4; expr = abs(ewfd.S21)^2; unit = %
  gev3: EvalGlobal "reflectance" | data = dset2; table = tbl5; expr = abs(ewfd.S11)^2

Tables
  tbl1: Table
    // rotation angle (atan(real(ewfd.Ey)/real(ewfd.Ex))*180/pi)
    freq (Hz)
    2.99792e+13
  tbl3: Table
    // phase (arg(ewfd.S21))
    descr = manual
    r_disk (nm) | freq (Hz) | arg(ewfd.S21)-phase_ref (rad)
    50 | 3.18928e+14 | -0.238195
    55 | 3.18928e+14 | -0.306845
    60 | 3.18928e+14 | -0.39147
    65 | 3.18928e+14 | -0.496715
    70 | 3.18928e+14 | -0.62939
    75 | 3.18928e+14 | -0.800026
    80 | 3.18928e+14 | -1.02572
    85 | 3.18928e+14 | -1.33529
    90 | 3.18928e+14 | -1.77857
    95 | 3.18928e+14 | -2.42798
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  tbl4: Table
    // transmittance (abs(ewfd.S21)^2)
    r_disk (nm) | freq (Hz) | abs(ewfd.S21)^2 (%)
    50 | 3.18928e+14 | 69.1607
    55 | 3.18928e+14 | 69.2223
    60 | 3.18928e+14 | 69.2248
    65 | 3.18928e+14 | 69.1439
    70 | 3.18928e+14 | 68.9586
    75 | 3.18928e+14 | 68.6829
    80 | 3.18928e+14 | 68.4278
    85 | 3.18928e+14 | 68.565
    90 | 3.18928e+14 | 69.9622
    95 | 3.18928e+14 | 73.0926
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  tbl5: Table
    // reflectance (abs(ewfd.S11)^2)
    freq (Hz) | abs(ewfd.S11)^2 (1)
    2.99792e+13 | 0.893682

Plots
  pg1: PlotGroup3D "Electric Field (ewfd) Ex" | data = dset2
    slc1: Slice "yz" | expr = ewfd.Ex; quickplane = zx; quickxnumber = 1; quickynumber = 1; shift = -1.0E-8
    slc2: Slice "xy" (disabled) | expr = abs(ewfd.Ex); quickplane = xy; quickznumber = 1; shift = -1.5E-6
    arws1: ArrowSurface (disabled) | expr = {ewfd.Ex, ewfd.Ey, ewfd.Ez}; arrowcount = 100
  pg3: PlotGroup3D "Electric Field (ewfd) norm" | data = dset2
    mslc1: Multislice | expr = ewfd.normE
  pg8: PlotGroup1D "phase" | data = none
    tblp1: Table "Table Graph 1" | table = tbl3; xaxisdata = 1; plotcolumninput = manual; plotcolumns = 3
  pg5: PlotGroup2D "E field, cross-section xy" | data = cpl3
    surf1: Surface
      cutplane = cpl1
      planefirst = {5.70700728604e-06, -8.08283363615e-06, 2.27076194632e-05}
      planesecond = {-5.70700728604e-06, 8.08283363615e-06, -1.77076195895e-05}
      planeisinit = on
      expr = ewfd.normE
    arws1: ArrowSurface
      planecoordsys = cartesian
      expr = {ewfd.Ex, ewfd.Ey, ewfd.Ez}
      descr = Electric field
      xnumber = 10
      ynumber = 10
      arrowlength = normalized
  pg9: PlotGroup1D "T" | data = none
    tblp1: Table "Table Graph 1" | table = tbl4; xaxisdata = auto; plotcolumninput = manual

Exports
  anim1: Animation | target = player; options = on; axes = on